// COMSOL Multiphysics 5.3.1.201 model "SMA (NiTi) Thin-Film.mph"
// Outline of the model tree

Geometry
  geom1 "Geometry 1" (3D, length unit µm)
    blk1: Block "Thin-Film" | size = {500, 200, 3}
    fin: Finalize "Form Union"

Materials
  mat1: Common "Ni-Ti (shape memory) [solid]" on domains 1
    def "Basic"
      density = rho(T[1/K])[kg/m^3]
      thermalconductivity = 18
      heatcapacity = 837.36
      electricconductivity = 12195
      relpermittivity = 1
      thermalexpansioncoefficient = 11e-6
      rho: Piecewise | arg = T; pieces = {293.0, 303.0, 6450.0}
    Enu "Young's modulus and Poisson's ratio"
      youngsmodulus = E(T[1/K])[Pa]
      poissonsratio = 0.33
      E: Piecewise
        arg = T
        pieces = 
          {100.0, 225.0, 8.50911E10-8.52221E7*T^1+259874.5*T^2-1378.122*T^3}
          {225.0, 275.0, -6.009346E11+9.125523E9*T^1-4.088967E7*T^2+59796.0*T^3}
          {275.0, 350.0, -2.403721E10+4.586047E8*T^1-558139.5*T^2}

Physics
  solid: SolidMechanics on all domains
    dependent variable u = {u, v, w}
    StructuralTransientBehavior.StructuralTransientBehavior = Quasistatic
    lemm1: LinearElasticModel "Linear Elastic Material 1" (default)
    free1: Free (default)
    init1: init "Initial Values 1" (default)
    fix1: Fixed "Fixed Constraint 1" on boundaries 1
  ht: HeatTransfer "Heat Transfer in Solids" on all domains
    dependent variable T
    ShapeProperty.order_temperature = 1
    solid1: SolidHeatTransferModel "Solid 1" (default)
    init1: init "Initial Values 1" (default)
    ins1: ThermalInsulation (default)
    temp1: TemperatureBoundary "Temperature 1" on boundaries 1
  ec: ConductiveMedia "Electric Currents" on all domains
    dependent variable V
    cucn1: CurrentConservation (default)
    ein1: ElectricInsulation (default)
    init1: init "Initial Values 1" (default)
    gnd1: Ground on boundaries 1
    term1: Terminal on boundaries 6 | I0 = 0.5

Multiphysics
  te1: ThermalExpansion on all domains | Heat_physics = ht; Solid_physics = solid
  tc1: TemperatureCoupling | TemperatureSource_physics = ht; TemperatureDestination_physics = solid
  emh1: ElectromagneticHeating | EMHeat_physics = ec; Heat_physics = ht

Mesh
  mesh1 "Mesh 1" (physics-controlled)
    size: MeshSizeDefault | hauto = 7

Studies
  std1 "Study 1"
    stat: Stationary

Solver configurations
  sol1 "Solution 1" (study std1)
    v1: Variables "Dependent Variables 1"
    s1: Stationary "Stationary Solver 1"
      se1: Segregated
        ss1: SegregatedStep | segvar = {comp1_V, comp1_ec_term1_V0_ode}; linsolver = i1
        ss2: SegregatedStep "Temperature T" | segvar = {comp1_T}; linsolver = d1; subjtech = minimal
        ss3: SegregatedStep | segvar = {comp1_u}; linsolver = d2
        ll1: LowerLimit | lowerlimit = comp1.T 0
      i1: Iterative | linsolver = cg
        mg1: Multigrid | prefun = amg
      d1: Direct | linsolver = pardiso
      d2: Direct "Suggested Direct Solver (solid)"

Datasets
  dset1: Solution | solution = sol1

Plots
  pg1: PlotGroup3D "Stress (solid)" | data = dset1
    surf1: Surface | expr = solid.mises
      def: Deform "Deformation" | expr = {u, v, w}; descr = Displacement field
  pg2: PlotGroup3D "Temperature (ht)" | data = dset1
    surf1: Surface | expr = T
  pg3: PlotGroup3D "Isothermal Contours (ht)" | data = dset1
    iso1: Isosurface | expr = T
  pg4: PlotGroup3D "Electric Potential (ec)" | data = dset1
    mslc1: Multislice | expr = V
  pg5: PlotGroup3D "Total Displacement" | data = dset1
    surf1: Surface | expr = solid.disp; descr = Total displacement
      def1: Deform "Deformation 1" | expr = {u, v, w}
  pg6: PlotGroup3D "Vertical Displacement" | data = dset1
    surf1: Surface | expr = w; descr = Displacement field, Z component
      def1: Deform "Deformation 1" | expr = {u, v, w}