// COMSOL Multiphysics 4.4.0.150 model "actuator.mph"
// Outline of the model tree

Geometry
  geom1 "Geometry 1" (3D, length unit cm)
    blk1: Block | size = {10, 10, 0.1}
    blk2: Block | pos = {0, 0, 0.1}; size = {10, 10, 0.5}
    blk3: Block | pos = {0.5, 0, 0.6}; size = {10, 10, 0.1}
    blk4: Block | pos = {0.5, 0, 0.7}; size = {10, 10, 0.5}
    blk5: Block | pos = {1, 0, 1.2}; size = {10, 10, 0.1}
    blk6: Block | pos = {1, 0, 1.3}; size = {10, 10, 0.5}
    blk7: Block | pos = {1.5, 0, 1.8}; size = {10, 10, 0.1}
    blk8: Block | pos = {1.5, 0, 1.9}; size = {10, 10, 0.5}
    blk9: Block | pos = {2, 0, 2.4}; size = {10, 10, 0.1}
    fin: Finalize "Form Union"

Materials
  mat1 "Lead Zirconate Titanate (PZT-5H)" on domains 2, 4, 6, 8
    def "Basic"
      density = 7500[kg/m^3]
    StrainCharge "Strain-charge form"
      sE = {1.65e-011[1/Pa], -4.78e-012[1/Pa], -8.45e-012[1/Pa], 0[1/Pa], 0[1/Pa], 0[1/Pa], -4.78e-012[1/Pa], 1.65e-011[1/Pa], -8.45e-012[1/Pa], 0[1/Pa], 0[1/Pa], 0[1/Pa], -8.45e-012[1/Pa], -8.45e-012[1/Pa], 2.07e-011[1/Pa], 0[1/Pa], 0[1/Pa], 0[1/Pa], 0[1/Pa], 0[1/Pa], 0[1/Pa], 4.35e-011[1/Pa], 0[1/Pa], 0[1/Pa], 0[1/Pa], 0[1/Pa], 0[1/Pa], 0[1/Pa], 4.35e-011[1/Pa], 0[1/Pa], 0[1/Pa], 0[1/Pa], 0[1/Pa], 0[1/Pa], 0[1/Pa], 4.26e-011[1/Pa]}
      dET = {0[C/N], 0[C/N], -2.74e-010[C/N], 0[C/N], 0[C/N], -2.74e-010[C/N], 0[C/N], 0[C/N], 5.93e-010[C/N], 0[C/N], 7.41e-010[C/N], 0[C/N], 7.41e-010[C/N], 0[C/N], 0[C/N], 0[C/N], 0[C/N], 0[C/N]}
      epsilonrT = diag{3130, 3130, 3400}
      eta_sE = {0, 0, 0, 0, 0, 0, 0, 0, 0, 0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}
      eta_dET = {0, 0, 0, 0, 0, 0, 0, 0, 0, 0, 0, 0, 0, 0, 0, 0, 0, 0}
      eta_epsilonT = 0
    StressCharge "Stress-charge form"
      cE = {1.27205e+011[Pa], 8.02122e+010[Pa], 8.46702e+010[Pa], 0[Pa], 0[Pa], 0[Pa], 8.02122e+010[Pa], 1.27205e+011[Pa], 8.46702e+010[Pa], 0[Pa], 0[Pa], 0[Pa], 8.46702e+010[Pa], 8.46702e+010[Pa], 1.17436e+011[Pa], 0[Pa], 0[Pa], 0[Pa], 0[Pa], 0[Pa], 0[Pa], 2.29885e+010[Pa], 0[Pa], 0[Pa], 0[Pa], 0[Pa], 0[Pa], 0[Pa], 2.29885e+010[Pa], 0[Pa], 0[Pa], 0[Pa], 0[Pa], 0[Pa], 0[Pa], 2.34742e+010[Pa]}
      eES = {0[C/m^2], 0[C/m^2], -6.62281[C/m^2], 0[C/m^2], 0[C/m^2], -6.62281[C/m^2], 0[C/m^2], 0[C/m^2], 23.2403[C/m^2], 0[C/m^2], 17.0345[C/m^2], 0[C/m^2], 17.0345[C/m^2], 0[C/m^2], 0[C/m^2], 0[C/m^2], 0[C/m^2], 0[C/m^2]}
      epsilonrS = diag{1704.4, 1704.4, 1433.6}
      eta_cE = {0, 0, 0, 0, 0, 0, 0, 0, 0, 0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}
      eta_eES = {0, 0, 0, 0, 0, 0, 0, 0, 0, 0, 0, 0, 0, 0, 0, 0, 0, 0}
      eta_epsilonS = 0
  mat2 "Au" on domains 1, 3, 5, 7, 9
    def "Basic"
      electricconductivity = 45.6e6[S/m]
      thermalexpansioncoefficient = 14.2e-6[1/K]
      heatcapacity = 129[J/(kg*K)]
      density = 19300[kg/m^3]
      thermalconductivity = 317[W/(m*K)]
      relpermittivity = 1
    Enu "Young's modulus and Poisson's ratio"
      youngsmodulus = 70e9[Pa]
      poissonsratio = 0.44
    StressCharge "Stress-charge form"
      cE = {0, 0, 0, 0, 0, 0, 0, 0, 0, 0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}
      eES = {0, 0, 0, 0, 0, 0, 0, 0, 0, 0, 0, 0, 0, 0, 0, 0, 0, 0}
      epsilonrS = 1
      eta_cE = {0, 0, 0, 0, 0, 0, 0, 0, 0, 0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}
      eta_eES = {0, 0, 0, 0, 0, 0, 0, 0, 0, 0, 0, 0, 0, 0, 0, 0, 0, 0}
      eta_epsilonS = 0

Physics
  pzd: PiezoelectricDevices on domains 2, 4, 6, 8
    dependent variable u = {u, v, w}
    pzm1: PiezoelectricModel "Piezoelectric Material 1" (default)
    free1: Free (default)
    zc1: ZeroCharge (default)
    init1: init "Initial Values 1" (default)
    fix1: Fixed "Fixed Constraint 1" on boundaries 4, 13, 22, 31
    pot1: ElectricPotential on boundaries 6, 7, 16, 25, 34 | V0 = 50

Mesh
  mesh1 "Mesh 1" (physics-controlled)
    size: MeshSizeDefault | hauto = 9

Studies
  std1 "Study 1"
    stat: Stationary

Solver configurations
  sol1 "Solver 1" (study std1)
    v1: Variables "Dependent Variables 1"
    s1: Stationary "Stationary Solver 1"
      fc1: FullyCoupled | linsolver = d1
      d1: Direct | linsolver = pardiso

Datasets
  dset1: Solution | solution = sol1

Plots
  pg1: PlotGroup3D "Displacement (pzd)" | data = dset1
    surf1: Surface | expr = pzd.disp
      def: Deform "Deformation" | expr = {u, v, w}
  pg2: PlotGroup3D "Potential (pzd)" | data = dset1
    slc1: Slice | expr = V; genpoints = {{0, 0, 0}, {1, 0, 0}, {0, 1, 0}}