// COMSOL Multiphysics 5.3.1.201 model "Piezoelectric Sensor.mph"
// Outline of the model tree

Geometry
  geom1 "Geometry 1" (3D, length unit mm)
    cyl1: Cylinder | r = 20; h = 2
    fin: Finalize "Form Union"

Materials
  mat1: Common "Lead Zirconate Titanate (PZT-8)" on domains 1
    def "Basic"
      relpermittivity = diag{904.4, 904.4, 561.6}
      density = 7600[kg/m^3]
    StrainCharge "Strain-charge form"
      sE = {1.15e-011[1/Pa], -3.7e-012[1/Pa], -4.8e-012[1/Pa], 0[1/Pa], 0[1/Pa], 0[1/Pa], -3.7e-012[1/Pa], 1.15e-011[1/Pa], -4.8e-012[1/Pa], 0[1/Pa], 0[1/Pa], 0[1/Pa], -4.8e-012[1/Pa], -4.8e-012[1/Pa], 1.35e-011[1/Pa], 0[1/Pa], 0[1/Pa], 0[1/Pa], 0[1/Pa], 0[1/Pa], 0[1/Pa], 3.19e-011[1/Pa], 0[1/Pa], 0[1/Pa], 0[1/Pa], 0[1/Pa], 0[1/Pa], 0[1/Pa], 3.19e-011[1/Pa], 0[1/Pa], 0[1/Pa], 0[1/Pa], 0[1/Pa], 0[1/Pa], 0[1/Pa], 3.04e-011[1/Pa]}
      dET = {0[C/N], 0[C/N], -9.7e-011[C/N], 0[C/N], 0[C/N], -9.7e-011[C/N], 0[C/N], 0[C/N], 2.25e-010[C/N], 0[C/N], 3.3e-010[C/N], 0[C/N], 3.3e-010[C/N], 0[C/N], 0[C/N], 0[C/N], 0[C/N], 0[C/N]}
      epsilonrT = diag{1290, 1290, 1000}
      eta_sE = {0, 0, 0, 0, 0, 0, 0, 0, 0, 0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}
      eta_dET = {0, 0, 0, 0, 0, 0, 0, 0, 0, 0, 0, 0, 0, 0, 0, 0, 0, 0}
      eta_epsilonT = 0
    StressCharge "Stress-charge form"
      cE = {1.46876e+011[Pa], 8.1087e+010[Pa], 8.10537e+010[Pa], 0[Pa], 0[Pa], 0[Pa], 8.1087e+010[Pa], 1.46876e+011[Pa], 8.10537e+010[Pa], 0[Pa], 0[Pa], 0[Pa], 8.10537e+010[Pa], 8.10537e+010[Pa], 1.31712e+011[Pa], 0[Pa], 0[Pa], 0[Pa], 0[Pa], 0[Pa], 0[Pa], 3.1348e+010[Pa], 0[Pa], 0[Pa], 0[Pa], 0[Pa], 0[Pa], 0[Pa], 3.1348e+010[Pa], 0[Pa], 0[Pa], 0[Pa], 0[Pa], 0[Pa], 0[Pa], 3.28947e+010[Pa]}
      eES = {0[C/m^2], 0[C/m^2], -3.87538[C/m^2], 0[C/m^2], 0[C/m^2], -3.87538[C/m^2], 0[C/m^2], 0[C/m^2], 13.9108[C/m^2], 0[C/m^2], 10.3448[C/m^2], 0[C/m^2], 10.3448[C/m^2], 0[C/m^2], 0[C/m^2], 0[C/m^2], 0[C/m^2], 0[C/m^2]}
      epsilonrS = diag{904.4, 904.4, 561.6}
      eta_cE = {0, 0, 0, 0, 0, 0, 0, 0, 0, 0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}
      eta_eES = {0, 0, 0, 0, 0, 0, 0, 0, 0, 0, 0, 0, 0, 0, 0, 0, 0, 0}
      eta_epsilonS = 0

Physics
  solid: SolidMechanics on domains 1
    dependent variable u = {u, v, w}
    lemm1: LinearElasticModel "Linear Elastic Material 1" (default)
    free1: Free (default)
    init1: init "Initial Values 1" (default)
    pzm1: PiezoelectricMaterialModel "Piezoelectric Material 1" on all domains
    fix1: Fixed "Fixed Constraint 1" on boundaries 1, 2, 5, 6
    bndl1: BoundaryLoad on boundaries 3, 4 | LoadType = FollowerPressure; FollowerPressure = 25e5
  es: Electrostatics on all domains
    dependent variable V
    ccn1: ChargeConservation (default)
    zc1: ZeroCharge (default)
    init1: init "Initial Values 1" (default)
    ccnp1: ChargeConservationPiezo "Charge Conservation, Piezoelectric 1" on all domains
    pot1: ElectricPotential on points 1-8

Multiphysics
  pze1: PiezoelectricEffect on all domains | Solid_physics = solid; Electrostatics_physics = es

Mesh
  mesh1 "Mesh 1" (physics-controlled)

Studies
  std1 "Study 1"
    stat: Stationary

Solver configurations
  sol1 "Solution 1" (study std1)
    v1: Variables "Dependent Variables 1"
    s1: Stationary "Stationary Solver 1"
      fc1: FullyCoupled | linsolver = d1
      d1: Direct

Datasets
  dset1: Solution | solution = sol1

Plots
  pg1: PlotGroup3D "Stress (solid)" | data = dset1
    surf1: Surface | expr = V; descr = Electric potential
      def: Deform "Deformation" | expr = {u, v, w}; descr = Displacement field
  pg2: PlotGroup3D "Electric Potential (es)" | data = dset1
    mslc1: Multislice | expr = V